# OpenSim document version 40000
ExternalLoads:
  datafile: Standing_GRF.mot
  external_loads_model_kinematics_file: Standing_Posture.mot
  lowpass_cutoff_frequency_for_load_kinematics: -1
  ExternalForce R_GRF: applied_to_body=calcn_r force_expressed_in_body=ground point_expressed_in_body=ground
      force_identifier=R_ground_force_v point_identifier=R_ground_force_p torque_identifier=R_ground_torque_
  ExternalForce L_GRF: applied_to_body=calcn_l force_expressed_in_body=ground point_expressed_in_body=ground
      force_identifier=L_ground_force_v point_identifier=L_ground_force_p torque_identifier=L_ground_torque_
  ExternalForce R_GRF2: applied_to_body=toes_r force_expressed_in_body=ground point_expressed_in_body=ground
      force_identifier=R_ground_force2_v point_identifier=R_ground_force2_p torque_identifier=R_ground_torque2_
  ExternalForce L_GRF2: applied_to_body=toes_l force_expressed_in_body=ground point_expressed_in_body=ground
      force_identifier=L_ground_force2_v point_identifier=L_ground_force2_p torque_identifier=L_ground_torque2_
