# OpenSim document version 40000
Model ThoracoscapularShoulderModel:
  gravity: 0 -9.80665 0
  length_units: meters
  force_units: N
  credits:
    Ajay Seth, Meilin Dong, Ricardo Matias, Scott Delp. Parameters from van der Helm and Klein-Breteler
  publications:
    Frontiers in Neurorobotics: in In Press DSEM: van der Helm 1994 Klein-Breteler et al. 1996.
  Ground
  BodySet:
    Body thorax: mass=20.45505 [kg] mass_center=(-0.05909986 -0.148601 0) inertia=(1.14705 0.4880821 1.14705 0 0 0)
        meshes=(thorax.vtp groundspine.vtp)
      WrapEllipsoid Thorax: xyz_body_rotation=(-0.17 -0.0383972 0.212232)
          translation=(-0.02199988 -0.1467009 0.06999836) quadrant=all dimensions=(0.0740668 0.169952 0.0704834)
      WrapEllipsoid EllipsoidSurface: translation=(-0.01999993 -0.01730009 0.07967259) quadrant=all
          dimensions=(0.0994228 0.200001 0.0993853)
    Body clavicle: mass=0.1897729 mass_center=(-0.01110064 0.006371761 0.05417029)
        inertia=(0.0002676737 0.0002676737 4.901324e-5 -2.094264e-5 -7.717231e-5 5.926065e-5) meshes=clavicle.vtp
      PhysicalOffsetFrame cp_in_clavicle: socket_parent=.. translation=(-0.02924 0.02024 0.12005) [meters]
    Body scapula: mass=0.5015989 mass_center=(-0.05468973 -0.03503135 -0.04371461)
        inertia=(0.0008856693 0.0008193404 0.0008856693 0.0003202001 0.0002915427 0.0001717929) meshes=scapula.vtp
      PhysicalOffsetFrame cp_in_scapula: socket_parent=.. translation=(-0.01357 0.00011 -0.01523)
      WrapCylinder Subscapuralis: xyz_body_rotation=(1 -1 1) translation=(-0.02510093 -0.0389995 -0.02838988)
          quadrant=-y radius=0.01255591 length=0.08567586
      WrapCylinder Tmajscapula: xyz_body_rotation=(-1.4854 -0.3354 -0.8754)
          translation=(-0.08929952 -0.1062046 -0.05008224) quadrant=-y radius=0.00759205 length=0.0502915
      WrapEllipsoid deltsca: xyz_body_rotation=(1.4823 0.1606 -0.4472)
          translation=(-0.03429977 -0.03340137 -0.04428431) quadrant=all dimensions=(0.0403287 0.0906472 0.0300459)
      WrapCylinder Infra: xyz_body_rotation=(1.87 -0.543 -2.355) translation=(-0.05811966 -0.04590191 -0.04563393)
          quadrant=-y radius=0.01973532 length=0.1011614
    Body humerus: mass=1.880102 mass_center=(0.01805999 -0.1401004 -0.01274988)
        inertia=(0.01154762 0.00240096 0.01154762 -0.0003269573 -0.0002188252 0.0001156668) meshes=humerus.vtp
      WrapSphere hhead: translation=(-0.003200001 0.004900028 -0.001999988) quadrant=all radius=0.02453975
      WrapSphere hheadsupraTminor: translation=(-0.0008000003 0.004800024 0.002299987) quadrant=all radius=0.0234728
      WrapEllipsoid hheadInfra: xyz_body_rotation=(0.1419 0.13474 0.28117)
          translation=(9.999942e-5 0.001000005 -0.004799974) quadrant=all dimensions=(0.0298252 0.0233659 0.0302255)
    Body ulna: mass=0.9797719 mass_center=(0.009718 -0.09595 0.02429)
        inertia=(0.00479825 0.001022055 0.004381627 0.0002809099 -6.75017e-5 0.0009679824) meshes=ulna.vtp
      WrapCylinder PQ2: xyz_body_rotation=(1.39138 0.0689405 1.52245) translation=(-0.0012 -0.2092 0.0428) quadrant=all
          radius=0.007 length=0.01
    Body radius: mass=0.2070702 mass_center=(0.03363 -0.18156 0.0156)
        inertia=(0.0003887885 7.85289e-5 3.56877e-5 2.671702e-5 -3.758467e-6 5.689113e-5) meshes=radius.vtp
    Body hand: mass=0.4653762 mass_center=(0.0006 -0.0905 -0.0365)
        inertia=(0.0005661633 0.0001687764 0.0005661633 0 0 0)
  JointSet:
    CustomJoint ground_thorax: socket_parent_frame=ground_offset socket_child_frame=thorax_offset
      Coordinate ground_thorax_rot_x: default_value=0.06971656 range=(-3.141593 3.141593) clamped=false
      Coordinate ground_thorax_rot_y: default_value=-0.06316956 range=(-3.141593 3.141593) clamped=false
      Coordinate ground_thorax_rot_z: default_value=-0.1821671 range=(-3.141593 3.141593) clamped=false
      Coordinate ground_thorax_tx: default_value=-0.004231307 range=(-3.141593 3.141593) clamped=false locked=true
      Coordinate ground_thorax_ty: default_value=0.00403036 range=(-3.141593 3.141593) clamped=false locked=true
      Coordinate ground_thorax_tz: default_value=-0.0007835185 range=(-3.141593 3.141593) clamped=false locked=true
      PhysicalOffsetFrame ground_offset: socket_parent=/ground translation=(0 0 0)
      PhysicalOffsetFrame thorax_offset: socket_parent=/bodyset/thorax translation=(0 0 0)
      SpatialTransform:
        TransformAxis rotation1: coordinates=ground_thorax_rot_x axis=(1 0 0) LinearFunction(coefficients=1 0)
        TransformAxis rotation2: coordinates=ground_thorax_rot_y axis=(0 1 0) LinearFunction(coefficients=1 0)
        TransformAxis rotation3: coordinates=ground_thorax_rot_z axis=(0 0 1) LinearFunction(coefficients=1 0)
        TransformAxis translation1: coordinates=ground_thorax_tx axis=(1 0 0) LinearFunction(coefficients=1 0)
        TransformAxis translation2: coordinates=ground_thorax_ty axis=(0 1 0) LinearFunction(coefficients=1 0)
        TransformAxis translation3: coordinates=ground_thorax_tz axis=(0 0 1) LinearFunction(coefficients=1 0)
    CustomJoint sternoclavicular: socket_parent_frame=thorax_offset socket_child_frame=clavicle_offset
      Coordinate clav_prot: default_value=-0.2998917 range=(-3.141593 3.141593) clamped=true
      Coordinate clav_elev: default_value=-0.06473725 range=(-3.141593 3.141593) clamped=true
      PhysicalOffsetFrame thorax_offset: socket_parent=/bodyset/thorax translation=(0.006324977 0.006930043 0.02546443)
      PhysicalOffsetFrame clavicle_offset: socket_parent=/bodyset/clavicle translation=(0 0 0)
      SpatialTransform: axes_held_at_zero=(rotation3 translation1 translation2 translation3)
        TransformAxis rotation1: coordinates=clav_prot axis=(0.0153 0.9892987 -0.1451) LinearFunction(coefficients=1 0)
        TransformAxis rotation2: coordinates=clav_elev axis=(-0.9944725 0 -0.104997) LinearFunction(coefficients=1 0)
    ScapulothoracicJoint scapulothoracic: socket_parent_frame=thorax_offset socket_child_frame=scapula_offset
        thoracic_ellipsoid_radii_x_y_z=(0.0829975 0.199991 0.083001) scapula_winging_axis_origin=(0 0)
        scapula_winging_axis_direction=0 [radians]
      Coordinate scapula_abduction: default_value=-0.3115611 range=(-3.141593 3.141593) clamped=true
      Coordinate scapula_elevation: default_value=-0.05049787 range=(-3.141593 3.141593) clamped=true
      Coordinate scapula_upward_rot: default_value=0.2082049 range=(-3.141593 3.141593) clamped=true
      Coordinate scapula_winging: default_value=0.2735852 range=(-1.570796 1.570796) clamped=false
      PhysicalOffsetFrame thorax_offset: socket_parent=/bodyset/thorax translation=(-0.02942288 -0.01730009 0.07028557)
          orientation=(0 -0.87 0) [radians]
      PhysicalOffsetFrame scapula_offset: socket_parent=/bodyset/scapula
          translation=(-0.05981962 -0.0390416 -0.05598024) orientation=(-0.5181 -1.1416 -0.2854)
    CustomJoint GlenoHumeral: socket_parent_frame=scapula_offset socket_child_frame=humerus_offset
      Coordinate plane_elv: default_value=2.844205e-11 default_speed_value=1 range=(-1.5 3.141593) clamped=true
      Coordinate shoulder_elv: default_value=0.3216331 range=(-0.78 2.53) clamped=false
      Coordinate axial_rot: default_value=1.028832 default_speed_value=1 range=(-1.570795 1.570795) clamped=true
      PhysicalOffsetFrame scapula_offset: socket_parent=/bodyset/scapula
          translation=(-0.009549945 -0.03400136 0.008996822)
      PhysicalOffsetFrame humerus_offset: socket_parent=/bodyset/humerus translation=(0 0 0)
      SpatialTransform: axes_held_at_zero=(translation1 translation2 translation3)
        TransformAxis rotation1: coordinates=plane_elv axis=(0 1 0) LinearFunction(coefficients=1 0)
        TransformAxis rotation2: coordinates=shoulder_elv axis=(-1 0 0) LinearFunction(coefficients=1 0)
        TransformAxis rotation3: coordinates=axial_rot axis=(-0.0846 0.9947 -0.0584) LinearFunction(coefficients=1 0)
    CustomJoint elbow: socket_parent_frame=humerus_offset socket_child_frame=ulna_offset
      Coordinate elbow_flexion: default_value=5.193488e-24 range=(0 2.268928) clamped=false locked=true
      PhysicalOffsetFrame humerus_offset: socket_parent=/bodyset/humerus
          translation=(0.006100004 -0.2904012 -0.01229989)
      PhysicalOffsetFrame ulna_offset: socket_parent=/bodyset/ulna translation=(0 0 0)
      SpatialTransform: axes_held_at_zero=(rotation1 rotation2 translation1 translation2 translation3)
        TransformAxis rotation3: coordinates=elbow_flexion axis=(0.04940001 0.03660001 0.9981083)
            LinearFunction(coefficients=1 0)
    CustomJoint radioulnar: socket_parent_frame=ulna_offset socket_child_frame=radius_offset
      Coordinate pro_sup: default_value=0.598997 range=(-1.570796 1.570796) clamped=false locked=true
      PhysicalOffsetFrame ulna_offset: socket_parent=/bodyset/ulna translation=(0.0004 -0.011503 0.019999)
      PhysicalOffsetFrame radius_offset: socket_parent=/bodyset/radius translation=(0 0 0)
      SpatialTransform: axes_held_at_zero=(rotation1 rotation3 translation1 translation2 translation3)
        TransformAxis rotation2: coordinates=pro_sup axis=(-0.01716099 0.9926656 -0.119668)
            LinearFunction(coefficients=1 0)
    WeldJoint rc: socket_parent_frame=radius_offset socket_child_frame=hand_offset
      PhysicalOffsetFrame radius_offset: socket_parent=/bodyset/radius translation=(0.018 -0.242 0.025)
      PhysicalOffsetFrame hand_offset: socket_parent=/bodyset/hand translation=(0 0 0)
  ConstraintSet:
    PointConstraint AC: socket_body_1=/bodyset/clavicle socket_body_2=/bodyset/scapula
        location_body_1=(-0.02924 0.02024 0.12005) location_body_2=(-0.01357 0.00011 -0.01523)
