# OpenSim document version 30000
Model DummyModel:
  credits: Model authors names..
  publications: List of publications related to model...
  length_units: meters
  force_units: N
  gravity: 0 -9.80665 0
  BodySet:
    Body ground: mass=0 mass_center=(0 0 0) inertia_xx=0 inertia_yy=0 inertia_zz=0
    Body Base: mass=3.4465 mass_center=(4.4755e-8 -0.062356 2.8849e-18) inertia_xx=0.0070757 inertia_yy=0.091049
        inertia_zz=0.096688 inertia_xy=1.0747e-8 inertia_xz=2.8614e-22 inertia_yz=-5.1252e-18 meshes=Base.obj
      CustomJoint Base_to_ground: parent_body=ground location_in_parent=(0 0 0) location=(-0.3 0 0)
        Coordinate Base_to_ground_Rx: motion_type=rotational default_value=0 range=(-0.7853982 0.7853982) clamped=true
        Coordinate Base_to_ground_Ry: motion_type=rotational default_value=0 range=(-0.7853982 0.7853982) clamped=true
        Coordinate Base_to_ground_Rz: motion_type=rotational default_value=0 range=(-0.7853982 0.7853982) clamped=true
        Coordinate Base_to_ground_Tx: motion_type=translational default_value=0 range=(-0.1 0.1) clamped=true
        Coordinate Base_to_ground_Ty: motion_type=translational default_value=0 range=(-1 3) clamped=true
        Coordinate Base_to_ground_Tz: motion_type=translational default_value=0 range=(-0.1 0.1) clamped=true
        SpatialTransform:
          TransformAxis rotation1: coordinates=Base_to_ground_Rx axis=(1 0 0) LinearFunction(coefficients=1 0)
          TransformAxis rotation2: coordinates=Base_to_ground_Ry axis=(0 1 0) LinearFunction(coefficients=1 0)
          TransformAxis rotation3: coordinates=Base_to_ground_Rz axis=(0 0 1) LinearFunction(coefficients=1 0)
          TransformAxis translation1: coordinates=Base_to_ground_Tx axis=(1 0 0) LinearFunction(coefficients=1 0)
          TransformAxis translation2: coordinates=Base_to_ground_Ty axis=(0 1 0) LinearFunction(coefficients=1 0)
          TransformAxis translation3: coordinates=Base_to_ground_Tz axis=(0 0 1) LinearFunction(coefficients=1 0)
      WrapCylinder Joint_1_cylinder_1: translation=(0 -0.15 0) quadrant=-x radius=0.07 length=0.05
      WrapCylinder Joint_1_cylinder_2: xyz_body_rotation=(0 0 -0.4) translation=(0 -0.15 0) quadrant=x radius=0.12
          length=0.05
      WrapCylinder Joint_1_cylinder_3: xyz_body_rotation=(0 0 0.4) translation=(0 -0.15 0) quadrant=-x radius=0.12
          length=0.05
      WrapCylinder Joint_1_cylinder_4: xyz_body_rotation=(0 0 -0.5) translation=(0 -0.15 0) quadrant=x radius=0.07
          length=0.05
    Body Segment1: mass=3.6424 mass_center=(-2.725e-7 -0.325 5.4958e-19) inertia_xx=0.16228 inertia_yy=0.0037128
        inertia_zz=0.16448 inertia_xy=2.8426e-7 inertia_xz=6.1387e-21 inertia_yz=3.6456e-18 meshes=Segment1.obj
      CustomJoint Segment1_to_Base: parent_body=Base location_in_parent=(5.3429e-18 -0.15 -2.7964e-17) location=(0 0 0)
        Coordinate Joint_1: motion_type=rotational default_value=0 range=(-1.570796 1.570796) clamped=true
        SpatialTransform: axes_held_at_zero=(rotation2 rotation3 translation1 translation2 translation3)
          TransformAxis rotation1: coordinates=Joint_1 axis=(0 0 1) LinearFunction(coefficients=1 0)
      WrapCylinder Joint_2_cylinder_1: translation=(0 -0.65 0) quadrant=x radius=0.06 length=0.05
      WrapCylinder Joint_2_cylinder_2: translation=(0 -0.65 0) quadrant=-x radius=0.11 length=0.05
      WrapCylinder Joint_2_cylinder_3: translation=(0 -0.65 0) quadrant=-x radius=0.13 length=0.05
      WrapCylinder Joint_2_cylinder_4: translation=(0 -0.65 0) quadrant=x radius=0.09 length=0.05
    Body Segment2: mass=3.6424 mass_center=(-2.7251e-7 -0.325 4.1592e-17) inertia_xx=0.16228 inertia_yy=0.0037128
        inertia_zz=0.16448 inertia_xy=2.8344e-7 inertia_xz=-2.2983e-20 inertia_yz=-5.4518e-18 meshes=Segment2.obj
      CustomJoint Segment2_to_Segment1: parent_body=Segment1 location_in_parent=(0 -0.65 0) location=(0 0 0)
        Coordinate Joint_2: motion_type=rotational default_value=0 range=(-1.570796 1.570796) clamped=true
        SpatialTransform: axes_held_at_zero=(rotation2 rotation3 translation1 translation2 translation3)
          TransformAxis rotation1: coordinates=Joint_2 axis=(0 0 1) LinearFunction(coefficients=1 0)
