# OpenSim document version 40000
Model DummyModel:
  gravity: 0 -9.80665 0
  credits: Model authors names..
  publications: List of publications related to model...
  length_units: meters
  force_units: N
  Ground
  BodySet:
    Body Base: mass=3.4465 [kg] mass_center=(4.4755e-8 -0.062356 2.8849e-18)
        inertia=(0.0070757 0.091049 0.096688 1.0747e-8 2.8614e-22 -5.1252e-18) meshes=Base.obj
      WrapCylinder Joint_1_cylinder_1: translation=(0 -0.15 0) quadrant=-x radius=0.07 length=0.05
      WrapCylinder Joint_1_cylinder_2: xyz_body_rotation=(0 0 -0.4) translation=(0 -0.15 0) quadrant=x radius=0.12
          length=0.05
      WrapCylinder Joint_1_cylinder_3: xyz_body_rotation=(0 0 0.4) translation=(0 -0.15 0) quadrant=-x radius=0.12
          length=0.05
      WrapCylinder Joint_1_cylinder_4: xyz_body_rotation=(0 0 -0.5) translation=(0 -0.15 0) quadrant=x radius=0.07
          length=0.05
    Body Segment1: mass=3.6424 mass_center=(-2.725e-7 -0.325 5.4958e-19)
        inertia=(0.16228 0.0037128 0.16448 2.8426e-7 6.1387e-21 3.6456e-18) meshes=Segment1.obj
      WrapCylinder Joint_2_cylinder_1: translation=(0 -0.65 0) quadrant=x radius=0.06 length=0.05
      WrapCylinder Joint_2_cylinder_2: translation=(0 -0.65 0) quadrant=-x radius=0.11 length=0.05
      WrapCylinder Joint_2_cylinder_3: translation=(0 -0.65 0) quadrant=-x radius=0.13 length=0.05
      WrapCylinder Joint_2_cylinder_4: translation=(0 -0.65 0) quadrant=x radius=0.09 length=0.05
    Body Segment2: mass=3.6424 mass_center=(-2.7251e-7 -0.325 4.1592e-17)
        inertia=(0.16228 0.0037128 0.16448 2.8344e-7 -2.2983e-20 -5.4518e-18) meshes=Segment2.obj
    Body Segment3: mass=3.6424 mass_center=(-2.7251e-7 -0.325 4.1592e-17)
        inertia=(0.16228 0.0037128 0.16448 2.8344e-7 -2.2983e-20 -5.4518e-18) meshes=Segment2.obj
  JointSet:
    CustomJoint Base_to_ground: socket_parent_frame=ground_offset socket_child_frame=Base_offset
      Coordinate Base_to_ground_Rx: default_value=0 range=(-0.7853982 0.7853982) clamped=true
      Coordinate Base_to_ground_Ry: default_value=0 range=(-0.7853982 0.7853982) clamped=true
      Coordinate Base_to_ground_Rz: default_value=0 range=(-0.7853982 0.7853982) clamped=true
      Coordinate Base_to_ground_Tx: default_value=0 range=(-0.1 0.1) clamped=true
      Coordinate Base_to_ground_Ty: default_value=0 range=(-1 3) clamped=true
      Coordinate Base_to_ground_Tz: default_value=0 range=(-0.1 0.1) clamped=true
      PhysicalOffsetFrame ground_offset: socket_parent=/ground translation=(0 0 0) [meters]
      PhysicalOffsetFrame Base_offset: socket_parent=/bodyset/Base translation=(-0.3 0 0)
      SpatialTransform:
        TransformAxis rotation1: coordinates=Base_to_ground_Rx axis=(1 0 0) LinearFunction(coefficients=1 0)
        TransformAxis rotation2: coordinates=Base_to_ground_Ry axis=(0 1 0) LinearFunction(coefficients=1 0)
        TransformAxis rotation3: coordinates=Base_to_ground_Rz axis=(0 0 1) LinearFunction(coefficients=1 0)
        TransformAxis translation1: coordinates=Base_to_ground_Tx axis=(1 0 0) LinearFunction(coefficients=1 0)
        TransformAxis translation2: coordinates=Base_to_ground_Ty axis=(0 1 0) LinearFunction(coefficients=1 0)
        TransformAxis translation3: coordinates=Base_to_ground_Tz axis=(0 0 1) LinearFunction(coefficients=1 0)
    CustomJoint Segment1_to_Base: socket_parent_frame=Base_offset socket_child_frame=Segment1_offset
      Coordinate Joint_1: default_value=0 range=(-1.570796 1.570796) clamped=true
      PhysicalOffsetFrame Base_offset: socket_parent=/bodyset/Base translation=(5.3429e-18 -0.15 -2.7964e-17)
      PhysicalOffsetFrame Segment1_offset: socket_parent=/bodyset/Segment1 translation=(0 0 0)
      SpatialTransform: axes_held_at_zero=(rotation2 rotation3 translation1 translation2 translation3)
        TransformAxis rotation1: coordinates=Joint_1 axis=(0 0 1) LinearFunction(coefficients=1 0)
    CustomJoint Segment2_to_Segment1: socket_parent_frame=Segment1_offset socket_child_frame=Segment2_offset
      Coordinate Joint_2: default_value=0 range=(-1.570796 1.570796) clamped=true
      PhysicalOffsetFrame Segment1_offset: socket_parent=/bodyset/Segment1 translation=(0 -0.65 0)
      PhysicalOffsetFrame Segment2_offset: socket_parent=/bodyset/Segment2 translation=(0 0 0)
      SpatialTransform: axes_held_at_zero=(rotation2 rotation3 translation1 translation2 translation3)
        TransformAxis rotation1: coordinates=Joint_2 axis=(0 0 1) LinearFunction(coefficients=1 0)
    WeldJoint Segment3_to_Segment1: socket_parent_frame=Segment2_offset socket_child_frame=Segment3_offset
      PhysicalOffsetFrame Segment2_offset: socket_parent=/bodyset/Segment2 translation=(0 -0.65 0)
      PhysicalOffsetFrame Segment3_offset: socket_parent=/bodyset/Segment3 translation=(0 0 0)
  ForceSet:
    SmoothSphereHalfSpaceForce contact: stiffness=250000 dissipation=2 static_friction=0.8 dynamic_friction=0.8
        viscous_friction=0.5 transition_velocity=0.2 socket_sphere=/contactgeometryset/sphere
        socket_half_space=/contactgeometryset/floor
  ContactGeometrySet:
    ContactHalfSpace floor: socket_frame=/ground location=(0 0 0) orientation=(0 0 -1.570796)
    ContactSphere sphere: socket_frame=/bodyset/Segment2 location=(0 -0.65 0) radius=0.1
